# Title
# Created by:
# Arash Ahmadzadegan
# arash.ahmadzadegan@tycofp.com
V_in := 5 V
R_1 := 100 kΩ
V_out(R_2) := V_in*R_2/(R_2 + R_1)
R_2 := 10 kΩ, 11 kΩ .. 1000 kΩ
I(R_2) := V_out(R_2)/R_2*1
# [plot: V_out(R_2), I(R_2) (mA) vs R_2 (kΩ)]
5 V/1023 = 0.00488759 V
1023*3 V/(5 V) = 613.8
